# Title: ЛР 1 Вариант 10 — расчеты
# Description: Расчёт радиоканала по Мурсенкову
# ЛР 1. Вариант 10. Расчет радиоканала (Mathcad 15)
# Исходные данные варианта 1.10 (в основных единицах СИ)
R := 60*10^3
w := 0.93*10^5
P := 5*10^3
Pmin := 0.5*10^-6
S := 10
theta := 3*π/180
dw := 1.5*10^5
Dreq := 10/100
# Расчетные выражения
tau := 2/dw
tau = 1.33333e-5
T = 1 T
T := tan(0.99*π/2)/w
k := T/(T + tau)
k = 0.980893
d2 := 10*log(1/k)
d2 = 0.0837849
Q := 4*π*R^2/S
g := 1 - cos(theta)
d3 := 10*log(Q*g)
d3 = 67.9238
dtotal := d2 + d3
dtotal = 68.0076
dmax := 10*log(P/Pmin)
dmax = 100
Smin := 4*π*R^2*g*Pmin/(P*k)
Smin = 0.00632061
D := sqrt(1 - k)
D = 0.138229
Dpercent := 100*D
Dpercent = 13.8229
Sratio := S/Smin
Sratio = 1582.13
# Проверка условий реализуемости
# Площадь приёмной антенны:
S ≥ Smin = 1
# Общее затухание сигнала:
dtotal ≤ dmax = 1
# Линейные искажения:
D ≤ Dreq = 0
# Вывод: площадь антенны достаточна, но искажения 13,823% превышают допустимые 10%. Требования к качеству передачи не выполняются.
