# Title: ЛР №2. Вариант 10
# Description: Расчет радиоканала и ЦАП. Вариант 2.10
# ЛР 2. Вариант 10. Расчет радиоканала и ЦАП (Mathcad 15)
# Исходные данные варианта 2.10 (в единицах СИ)
R := 60*10^3
w := π*10^4
P := 35*10^3
Pmin := 1.5*10^-6
S := 2
theta := π/12
dw := 2*10^4
Dreq := 2.5/100
Tc := 10^-5
n := 8
# Расчетные выражения
tau := 2/dw
tau = 0.0001
T := tan(0.99*π/2)/w
T = 0.00202626
k := T/(T + tau)
k = 0.952969
d2 := 10*log(1/k)
d2 = 0.209212
g := 1 - cos(theta)
g = 0.0340742
Q := 4*π*R^2/S
Q = 2.26195e10
d3 := 10*log(Q*g)
d3 = 88.8691
dtotal := d2 + d3
dtotal = 89.0783
dmax := 10*log(P/Pmin)
dmax = 103.68
Smin := 4*π*R^2*g*Pmin/(P*k)
Smin = 0.0693238
Dlin := sqrt(1 - k)
Dlin = 0.216866
Dquant := 1/(2*(2^n - 1))
Dquant = 0.00196078
Dmin := sqrt(Dlin^2 + Dquant^2)
Dmin = 0.216875
Dpercent := 100*Dmin
Dpercent = 21.6875
Sratio := S/Smin
Sratio = 28.8501
# Проверка условий реализуемости: 1 - условие выполнено, 0 - нет
# 1. Площадь антенны достаточна
S ≥ Smin = 1
# 2. Затухание не превышает допустимое
dtotal ≤ dmax = 1
# 3. Нижняя оценка общей погрешности не превышает 2,5%
Dmin ≤ Dreq = 0
# В результате расчётов установлено, что площадь приёмной антенны достаточна, а затухание сигнала находится в допустимых пределах. Однако минимальная общая погрешность передачи составляет 21,69% при допустимом значении 2,5%. Следовательно, заданная технология информационного обмена не обеспечивает требуемое качество передачи информации.
